<?xml version="1.0"?>
<!--
  File:     CFM56.xml
  Author:   e-pilot, changes Soitanen

	CFM56-3B-2

  Inputs:
    name:           CFM56
    type:           turbine
    thrust:         22000 lb MOST POPULAR (?) ENGINE FOR 737-300
    augmented?      no
    injected?       no
-->

<turbine_engine name="CFM56">
  <milthrust> 29700.0 </milthrust>
  <bypassratio>     4.0 </bypassratio>
  <tsfc>            0.657 </tsfc>
  <bleed>           0.03 </bleed>
  <idlen1>         22.0 </idlen1>
  <idlen2>         61.0 </idlen2>
  <maxn1>         106.0 </maxn1>
  <maxn2>         105.0 </maxn2>
  <augmented>         0 </augmented>
  <injected>          0 </injected>

  <function name="IdleThrust">
   <table>
    <independentVar lookup="row">velocities/mach</independentVar>
    <independentVar lookup="column">atmosphere/rho-slugs_ft3</independentVar>
    <tableData>
	0.0003957363	0.0006047429	0.0008892757	0.0012664297	0.0017552648	0.0023768479	0.0031542928
0	0.1467	0.1183	0.0899	0.0694	0.0528	0.0436	0.042
0.2	0.1342	0.1049	0.0797	0.0544	0.0335	0.0501	0.05
0.4	0.1203	0.0891	0.0595	0.0272	0.002	0.0047	0.004
0.6	0.1073	0.0718	0.0276	0	0	0	0
0.8	0.09	0.0468	0.0174	0	0	0	0
1	0.07	0.0422	0	0	0	0	0
    </tableData>
   </table>
  </function>

  <function name="MilThrust">
   <table>
    <independentVar lookup="row">velocities/mach</independentVar>
    <independentVar lookup="column">atmosphere/rho-slugs_ft3</independentVar>
    <tableData>
	0.0006202683	0.0007061234	0.0008007873	0.0009048673	0.0011438182	0.00142829	0.0017639667	0.0019528855	0.002156907	0.0022869079	0.0023768479
0	0.2136812093	0.1812635771	0.296002293	0.3362109281	0.4206002595	0.5748921373	0.7061594859	0.7837391383	0.8895727734	0.9481731233	1
0.1	0.2136812093	0.1927928132	0.296002293	0.3345575368	0.4140817343	0.5460694243	0.6333974475	0.7074168779	0.8053116703	0.8588583152	0.8996122979
0.2	0.2136812093	0.2043220492	0.296002293	0.3329041455	0.4075639633	0.5172467113	0.5758455527	0.6542006095	0.7407321084	0.7829395969	0.8059000121
0.3	0.2136812093	0.2158512853	0.296002293	0.33125	0.4010454381	0.4884239983	0.5396119961	0.6114779447	0.6878318851	0.71408626	0.7300333394
0.4	0.2136812093	0.2273805214	0.296002293	0.3295966087	0.3945269129	0.459600531	0.5164811127	0.5843689657	0.6335701786	0.6505951303	0.6555025042
0.5	0.2136812093	0.2389097574	0.296002293	0.3279432175	0.3880091419	0.430777818	0.5044412262	0.5602379013	0.5784289766	0.587104755	0.5916085868
0.6	0.2136812093	0.2504389935	0.296002293	0.3262898262	0.3831568308	0.4106316377	0.5126772568	0.5178018646	0.5232877746	0.5236136254	0.5301638306
0.7	0.2197901581	0.2617170529	0.296002293	0.324636435	0.3798968139	0.4052747104	0.5261057808	0.4756056903	0.4681465725	0.4601224958	0.4687190743
0.8	0.2349067705	0.2709261103	0.3004714277	0.3307401038	0.3715815834	0.4194846729	0.5395350591	0.4334102703	0.4130053705	0.3966313662	0.4072743181
0.9	0.2501274741	0.283199825	0.3049465967	0.3561164917	0.3585483044	0.3968848057	0.5529643374	0.3912140961	0.3578641685	0.3331402365	0.3458288076
1	0.2653481776	0.2954735397	0.3094210113	0.3814928796	0.3455142711	0.3715521663	0.5663928615	0.3490179218	0.3027229664	0.2696498612	0.2843840514
    </tableData>
   </table>
  </function>

</turbine_engine>
